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/COM,ANSYS RELEASE Release 18.2      BUILD 18.2      UP20170726       15:10:06
/PREP7
/TITLE,1--Static Structural (A5)
ANTYPE, 0
EQSLV,SPAR,  0.00000000    ,,0
TOFFST,  273.150000
DMPOPT,ESAV,NO
DMPOPT,EMAT,NO
*IF,_CDRDOFF,EQ,1,THEN     !if solid model was read in
_CDRDOFF=             !reset flag, numoffs already performed
*ELSE              !offset database for the following FE model
NUMOFF,NODE,      944
NUMOFF,ELEM,      882
NUMOFF,MAT ,        1
NUMOFF,SECN,        1
NUMOFF,TYPE,        1
NUMOFF,CSYS,       12
*ENDIF
*SET,_ASMDIAG,  72.11102550928
*SET,_DS_PROGRESS,  999.0000000000
*SET,_MAXELEMNUM,  882.0000000000
*SET,_MAXELEMTYPE,  1.000000000000
*SET,_MAXNODENUM,  944.0000000000
*SET,_MAXREALCONST,  1.000000000000
*SET,_NUMELEM,  882.0000000000
*SET,_NUMNODE,  944.0000000000
*SET,_RETURN ,  0.000000000000
*SET,_STATUS ,  0.000000000000
*SET,_WALLBSOL,  15.16833333333
*SET,_WALLSTRT,  15.16833333333
*SET,_WB_PROJECTSCRATCH_DIR(1,       1,       1),'C:\Users\student\Desktop\fem\_ProjectScratch\ScrB48D\                                                                                                                                                                                                   '
*SET,_WB_SOLVERFILES_DIR(1,       1,       1),'C:\Users\student\Desktop\fem\1_files\dp0\SYS\MECH\                                                                                                                                                                                                      '
*SET,_WB_USERFILES_DIR(1,       1,       1),'C:\Users\student\Desktop\fem\1_files\user_files\                                                                                                                                                                                                        '
*SET,_XMAX   ,  0.000000000000
*SET,_XMIN   , -60.00000000000
*SET,_YMAX   ,  0.000000000000
*SET,_YMIN   ,  0.000000000000
*SET,_ZMAX   ,  0.000000000000
*SET,_ZMIN   , -40.00000000000
DOF,DELETE
ET,        1,181
KEYOP,        1, 3,        2
LOCAL,R5.0,LOC,      12, 0, -29.9999993    ,  0.00000000    , -19.9999995
LOCAL,R5.0,ANG,      12, 0,  0.00000000    ,  0.00000000    ,  0.00000000
LOCAL,R5.0,PRM,      12, 0,  1.00000000    ,  1.00000000
CSCIR,      12,       0,       0
CSYS,   0
NBLOCK,6,SOLID,       944,       944
(3i9,6e21.13e3)
        1        0        0-3.4000000000000E+001 0.0000000000000E+000-2.0000000000000E+001
        2        0        0-3.3873679410000E+001 0.0000000000000E+000-2.0997300260000E+001
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N,R5.3,LOC,       -1,
EBLOCK,19,SOLID,       882,       882
(19i9)
        1        1        1        1        0        0        0        0        4        0        1      312      332      275      275
        1        1        1        1        0        0        0        0        4        0        2      178      198      882      882
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       -1
MPTEMP,R5.0, 1, 1,  0.00000000    ,
MPDATA,R5.0, 1,EX  ,       1, 1,  200000.000    ,
MPTEMP,R5.0, 1, 1,  0.00000000    ,
MPDATA,R5.0, 1,NUXY,       1, 1, 0.300000000    ,
MPTEMP,R5.0, 1, 1,  0.00000000    ,
MPDATA,R5.0, 1,ALPX,       1, 1, 1.200000000E-05,
MPTEMP,R5.0, 1, 1,  0.00000000    ,
MPDATA,R5.0, 1,DENS,       1, 1, 7.850000000E-09,
MPTEMP,R5.0, 1, 1,  0.00000000    ,
MPDATA,R5.0, 1,KXX ,       1, 1,  60.5000000    ,
MPTEMP,R5.0, 1, 1,  0.00000000    ,
MPDATA,R5.0, 1,RSVX,       1, 1, 1.700000000E-04,
MPTEMP,R5.0, 1, 1,  0.00000000    ,
MPDATA,R5.0, 1,C   ,       1, 1,  434000000.    ,
MPTEMP,R5.0, 1, 1,  0.00000000    ,
MPDATA,R5.0, 1,MURX,       1, 1,  10000.0000    ,
SECTYPE,      1,SHELL,    ,
SECOFFSET,MID
SECBLOCK,      1
     2.000000,         0,     0.000000,         3
SECCONTROL,  0.0000    ,  0.0000    ,  0.0000    ,  0.0000    ,  1.0000    ,  1.0000    ,  1.0000    ,,,,,  0.0000
EXTOPT,ATTR,      0,      0,      0
EXTOPT,ESIZE,  0,  0.0000
EXTOPT,ACLEAR,      0
TREF,  22.0000000
IRLF,  0
BFUNIF,TEMP,_TINY
ACEL,  0.00000000    ,  0.00000000    ,  0.00000000
OMEGA,  0.00000000    ,  0.00000000    ,  0.00000000
DOMEGA,  0.00000000    ,  0.00000000    ,  0.00000000
CGLOC,  0.00000000    ,  0.00000000    ,  0.00000000
CGOMEGA,  0.00000000    ,  0.00000000    ,  0.00000000
DCGOMG,  0.00000000    ,  0.00000000    ,  0.00000000
NLDIAG,EFLG,OFF
NLDIAG,NRRE,OFF
NLDIAG,CONT,ITER

NSUBST,         1,         1,         1,
KUSE,     0
TIME,  1.00000000
ALPHAD,  0.00000000
BETAD,  0.00000000
DMPRAT,  0.00000000
DMPSTR,  0.00000000

CRPLIM, 0.100000000    ,   0
CRPLIM,  0.00000000    ,   1
NCNV,     1,  0.00000000    ,     0,  0.00000000    ,  0.00000000

NEQIT,     0

ERESX,DEFA
OUTRES, ALL,NONE,
OUTRES,NSOL, ALL,
OUTRES,RSOL, ALL,
OUTRES,STRS, ALL,
OUTRES,EPEL, ALL,
OUTRES,EPPL, ALL,

FINISH
